*Heading
** Job name: beam Model name: beam
** Generated by: Abaqus/CAE 2020
*Preprint, echo=NO, model=NO, history=NO, contact=NO
**
** PARTS
**
*Part, name=beam
*Node
      1,          0.5, -0.100000001
      2,    -0.099165, -0.100000001
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*********************** RECTENGULAR ***************************
*User element, nodes=4, type=U2, properties=3, coordinates=2, VARIABLES=12
6,7
***************************************************************
***************************************************************
*Element, type=U2
1, 16, 454, 456, 15
2, 413,  66,  67, 412
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********************* UMAT quad ***********************************
*Element, type=CPE4
4468, 16, 454, 456, 15
4469, 413,  66,  67, 412
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***************************************************************
*Elset, elset=uel_Beam, generate
4468, 8934, 1
*Elset, elset=uel_Beam_PH, generate
1, 4467, 1
***************************************************************
********************** ASSIGNING MATERIAL PROP ****************
***************************************************************
*Uel property, elset=uel_Beam_PH
0.01, 0.0027, 2
**lc, gc, AT
***************************************************************
** Section: umaterial
*Solid Section, elset=uel_Beam, material=umaterial
,
*End Part
**
**
** ASSEMBLY
**
*Assembly, name=Assembly
**
*Instance, name=beam-1, part=beam
*End Instance
**
*Node
      1,           0.,  0.600000024,           0.
*Node
      2,           0., -0.600000024,           0.
*Nset, nset=crack, instance=beam-1
   3,   4,   8,  11,  14,  83
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*Elset, elset=crack, instance=beam-1
4525, 4526, 4533, 4540, 4677, 4822
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*Nset, nset=fixed, instance=beam-1
   1,   6,   7,   9,  12, 120
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*Elset, elset=fixed, instance=beam-1
4547, 4563, 4569, 4570, 4618, 4722
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*Nset, nset=load_boundary_down, instance=beam-1
   5,   6, 101, 102, 103, 104
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*Elset, elset=load_boundary_down, instance=beam-1
4541, 4542, 4547, 4548, 4562, 4789
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*Nset, nset=load_boundary_up, instance=beam-1
  12,  13, 361, 362, 363, 364
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*Elset, elset=load_boundary_up, instance=beam-1
8247, 8248, 8255, 8806, 8815, 8825
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*Nset, nset=load_point_down
 2,
*Nset, nset=load_point_up
 1,
** Constraint: Constraint-1
*Equation
2
load_boundary_up, 2, 1.
load_point_up, 2, -1.
** Constraint: Constraint-1-x
*Equation
2
load_boundary_up, 1, 1.
load_point_up, 1, -1.
** Constraint: Constraint-2
*Equation
2
load_boundary_down, 2, 1.
load_point_down, 2, -1.
** Constraint: Constraint-2-x
*Equation
2
load_boundary_down, 1, 1.
load_point_down, 1, -1.
**
*Elset, elset=umatelem, instance=beam-1, generate
4468, 8934, 1
*Elset, elset=allelem, instance=beam-1, generate
4468, 8934, 1
**
*End Assembly
***************************************************************
*Amplitude, name=Amp-crk, time=TOTAL TIME
             0.,              0.,            0.25,              4.,             0.5,              0.,             10.,              0.
*Amplitude, name=Amp-load
             0.,              0.,              1.,            0.01
**
** MATERIALS
**
*Material, name=umaterial
*Depvar
      2,
*User Material, constants=5
210.,    0.3,   0.01, 0.0027,     2.
** ----------------------------------------------------------------
**
** STEP: Step-1
**
*Step, name=Step-1, nlgeom=NO, extrapolation=NO, inc=4
*Static, direct
0.25, 1.,
**
** BOUNDARY CONDITIONS
**
** Name: crack Type: Velocity/Angular velocity
*Boundary, amplitude=Amp-crk, type=VELOCITY
crack, 6, 6, 1.
**
** OUTPUT REQUESTS
**
*Restart, write, frequency=0
**
** FIELD OUTPUT: F-Output-1
**
*Output, field, number interval=20, time marks=NO
*Node Output
U,
*Element Output, directions=YES
SDV,
**
** HISTORY OUTPUT: H-Output-1
**
*Output, history, variable=PRESELECT
**
*CONTROLS, PARAMETERS=TIME INCREMENTATION
25, 100, , 100, , , , 100, , ,
*End Step
** ----------------------------------------------------------------
**
** STEP: Step-2
**
*Step, name=Step-2, nlgeom=NO, extrapolation=NO, inc=400
*Static, direct
0.0025, 1.,
**
** BOUNDARY CONDITIONS
**
** Name: down Type: Displacement/Rotation
*Boundary, amplitude=Amp-load
load_point_down, 1, 1
load_point_down, 2, 2, -1.
** Name: fixed Type: Displacement/Rotation
*Boundary
fixed, 1, 1
fixed, 2, 2
** Name: up Type: Displacement/Rotation
*Boundary, amplitude=Amp-load
load_point_up, 1, 1
load_point_up, 2, 2, 1.
**
** OUTPUT REQUESTS
**
*Restart, write, frequency=0
**
** FIELD OUTPUT: F-Output-1
**
*Output, field, number interval=20, time marks=NO
*Node Output
U,
*Element Output, directions=YES
SDV,
**
** HISTORY OUTPUT: H-Output-1
**
*Output, history, variable=PRESELECT
**
*CONTROLS, PARAMETERS=TIME INCREMENTATION
25, 100, , 100, , , , 100, , ,
*End Step
