*Heading
** Job name: beam Model name: beam
** Generated by: Abaqus/CAE 2020
*Preprint, echo=NO, model=NO, history=NO, contact=NO
**
** PARTS
**
*Part, name=beam
*Node
      1, 0.00449997513, 0.00025099999
      2, 0.00185400003, 0.00025099999
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*********************** RECTENGULAR ***************************
*User element, nodes=4, type=U2, properties=3, coordinates=2, VARIABLES=12
6,7
***************************************************************
***************************************************************
*Element, type=U2
1, 1,  11, 706, 393
2, 11,  12, 707, 706
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********************* UMAT quad ***********************************
*Element, type=CPE4
5484, 1,  11, 706, 393
5485, 11,  12, 707, 706
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********************* non UMAT quad ***********************************
*Element, type=CPE4
10967, 2,  479, 5762, 394
10968, 479,  478, 5763, 5762
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***************************************************************
*Elset, elset=elastic, generate
10967, 11307, 1
*Elset, elset=uel_Beam, generate
5484, 10966, 1
*Elset, elset=uel_Beam_PH, generate
1, 5483, 1
***************************************************************
********************** ASSIGNING MATERIAL PROP ****************
***************************************************************
*Uel property, elset=uel_Beam_PH
3e-05, 989, 2
**lc, gc, AT
***************************************************************
** Section: umaterial
*Solid Section, elset=uel_Beam, material=umaterial
,
** Section: elastic
*Solid Section, elset=elastic, material=elastic
,
*End Part
**
**
** ASSEMBLY
**
*Assembly, name=Assembly
**
*Instance, name=beam-1, part=beam
*End Instance
**
*Node
      1,           0., 0.00179999997,           0.
*Node
      2,           0., -0.00179999997,           0.
*Nset, nset=crack, instance=beam-1
   3,   4,   7, 203, 204, 205
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*Elset, elset=crack, instance=beam-1
8483, 8484, 8485, 8486, 8487, 8488
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*Nset, nset=fixed, instance=beam-1
   1,   5,   9, 378, 379, 380
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*Elset, elset=fixed, instance=beam-1
5484, 5661, 5838, 6015, 6192, 6369
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*Nset, nset=load_boundary_up, instance=beam-1
   6,   7,  10, 424, 425, 426
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*Elset, elset=load_boundary_up, instance=beam-1
8523, 8554, 8585, 8616, 8647, 8678
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*Nset, nset=load_point_up
 1,
*Nset, nset=xsymme, instance=beam-1
   6,  10, 696, 697, 698, 699, 700, 701, 702, 703, 704, 705
*Elset, elset=xsymme, instance=beam-1
11297, 11298, 11299, 11300, 11301, 11302, 11303, 11304, 11305, 11306, 11307
*Nset, nset=ysymme, instance=beam-1
   3,   5, 212, 213, 214, 215
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*Elset, elset=ysymme, instance=beam-1
8316, 8317, 8318, 8319, 8320, 8321
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** Constraint: Constraint-1
*Equation
2
load_boundary_up, 2, 1.
load_point_up, 2, -1.
**
*Elset, elset=umatelem, instance=beam-1, generate
5484, 10966, 1
*Elset, elset=allelem, instance=beam-1, generate
5484, 11307, 1
**
*End Assembly
***************************************************************
*Amplitude, name=Amp-crk, time=TOTAL TIME
             0.,              0.,            0.25,              4.,             0.5,              0.,             10.,              0.
*Amplitude, name=Amp-load, time=TOTAL TIME
             0.,              0.,              1.,           8e-05,              2.,          0.0002
**
** MATERIALS
**
*Material, name=elastic
*Elastic
 1e+10, 0.3
*Material, name=umaterial
*Depvar
      2,
*User Material, constants=5
 1e+10,   0.3, 3e-05,  989.,    2.
** ----------------------------------------------------------------
**
** STEP: Step-1
**
*Step, name=Step-1, nlgeom=NO, extrapolation=NO, inc=4
*Static, direct
0.25, 1.,
**
** BOUNDARY CONDITIONS
**
** Name: crack Type: Velocity/Angular velocity
*Boundary, amplitude=Amp-crk, type=VELOCITY
crack, 6, 6, 1.
** Name: fixed Type: Displacement/Rotation
*Boundary
fixed, 1, 1
fixed, 2, 2
** Name: xsmme Type: Displacement/Rotation
*Boundary
xsymme, 1, 1
** Name: ysmme Type: Displacement/Rotation
*Boundary
ysymme, 2, 2
**
** OUTPUT REQUESTS
**
*Restart, write, frequency=0
**
** FIELD OUTPUT: F-Output-1
**
*Output, field, number interval=20, time marks=NO
*Node Output
U,
*Element Output, directions=YES
SDV,
**
** HISTORY OUTPUT: H-Output-1
**
*Output, history, variable=PRESELECT
**
*CONTROLS, PARAMETERS=TIME INCREMENTATION
25, 100, , 100, , , , 100, , ,
*End Step
** ----------------------------------------------------------------
**
** STEP: Step-2
**
*Step, name=Step-2, nlgeom=NO, extrapolation=NO, inc=1000
*Static, direct
0.001, 1.,
**
** BOUNDARY CONDITIONS
**
** Name: up Type: Displacement/Rotation
*Boundary, amplitude=Amp-load
load_point_up, 2, 2, 1.
**
** OUTPUT REQUESTS
**
*Restart, write, frequency=0
**
** FIELD OUTPUT: F-Output-1
**
*Output, field, number interval=20, time marks=NO
*Node Output
U,
*Element Output, directions=YES
SDV,
**
** HISTORY OUTPUT: H-Output-1
**
*Output, history, variable=PRESELECT
**
*CONTROLS, PARAMETERS=TIME INCREMENTATION
25, 100, , 100, , , , 100, , ,
*End Step
